*Heading
** Job name: UPLATE Model name: Model-1-UMAT
** Generated by: Abaqus/CAE 2018
*Preprint, echo=NO, model=NO, history=NO, contact=NO
**
** PARTS
**
*Part, name=plate-UMAT
*Node
      1,           0.,         240.
      2,           0.,         230.
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*Element, type=CPE3
 1, 3033, 3059, 2461
 2, 2329, 2236, 2270
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*Element, type=CPE4
  93,  620,    1,  816,  726
  94,  620,  726,  696,   22
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*Nset, nset=Set-2, generate
    1,  3097,     1
*Elset, elset=Set-2, generate
    1,  3043,     1
** Section: Section-1
*Solid Section, elset=Set-2, material=Uplate
,
*End Part
**
**
** ASSEMBLY
**
*Assembly, name=Assembly
**
*Instance, name=plate-1, part=plate-UMAT
*End Instance
**
*Nset, nset=Set-1, instance=plate-1
   1,   2,   3,   4,   5,   6
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*Elset, elset=Set-1, instance=plate-1
   93,   94,  117,  142,  163,  186
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*Nset, nset=Set-2, instance=plate-1
  27,  28,  29,  30,  31,  32
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*Elset, elset=Set-2, instance=plate-1
  115,  140,  161,  162,  184,  185
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*Nset, nset=Set-3, instance=plate-1
  49,  50,  51,  52,  53,  54
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*Elset, elset=Set-3, instance=plate-1
  115,  116,  419,  443,  465,  737
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*End Assembly
**
** MATERIALS
**
*Material, name=Uplate
*User Material, constants=2
200000., 0.3
** ----------------------------------------------------------------
**
** STEP: Step-1
**
*Step, name=Step-1, nlgeom=NO
*Static
0.1, 1., 1e-05, 1.
**
** BOUNDARY CONDITIONS
**
** Name: Displacement Type: Displacement/Rotation
*Boundary
Set-3, 1, 1, 0.1
** Name: Xsym Type: Symmetry/Antisymmetry/Encastre
*Boundary
Set-1, XSYMM
** Name: Ysym Type: Symmetry/Antisymmetry/Encastre
*Boundary
Set-2, YSYMM
**
** OUTPUT REQUESTS
**
*Restart, write, frequency=0
**
** FIELD OUTPUT: F-Output-1
**
*Output, field, variable=PRESELECT
**
** HISTORY OUTPUT: H-Output-1
**
*Output, history, variable=PRESELECT
*End Step
