*Heading
** Job name: Job-UMAT Model name: Model-UMAT
** Generated by: Abaqus/CAE 2018
*Preprint, echo=NO, model=NO, history=NO, contact=NO
**
** PARTS
**
*Part, name=Beam
*Node
      1,          7.5,          15.,         150.
      2,          7.5,          10.,         150.
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*Element, type=C3D8
  1, 218, 219, 226, 225,   1,   2,   9,   8
  2, 219, 220, 227, 226,   2,   3,  10,   9
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*Nset, nset=_PickedSet2, internal, generate
   1,  868,    1
*Elset, elset=_PickedSet2, internal, generate
   1,  540,    1
** Section: Section-1
*Solid Section, elset=_PickedSet2, material=Material-UMAT
,
*End Part
**
**
** ASSEMBLY
**
*Assembly, name=Assembly
**
*Instance, name=Beam-1, part=Beam
*End Instance
**
*Node
      1,           0.,           0.,         150.
*Nset, nset=RP-1
 1,
*Nset, nset=_PickedSet5, internal, instance=Beam-1
 211, 212, 213, 214, 215, 216
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*Elset, elset=_PickedSet5, internal, instance=Beam-1
 175, 176, 177, 178, 179, 180
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*Nset, nset=_PickedSet18, internal, instance=Beam-1
   1,   2,   3,   4,   5,   6
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*Elset, elset=_PickedSet18, internal, instance=Beam-1
   1,   2,   3,   4,   5,   6
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*End Assembly
**
** MATERIALS
**
*Material, name=Material-1
*Elastic
200000., 0.3
*Plastic
200.,    0.
220., 0.009
220., 0.029
*Material, name=Material-UMAT
*Depvar
     13,
*User Material, constants=8
200000.,   0.3,  200.,    0.,  220., 0.009,  220., 0.029
**
** BOUNDARY CONDITIONS
**
** Name: BC-1 Type: Displacement/Rotation
*Boundary
_PickedSet5, 1, 1
_PickedSet5, 2, 2
_PickedSet5, 3, 3
_PickedSet5, 4, 4
_PickedSet5, 5, 5
_PickedSet5, 6, 6
** ----------------------------------------------------------------
**
** STEP: Step-1
**
*Step, name=Step-1, nlgeom=NO
*Static, direct
0.05, 1.,
**
** BOUNDARY CONDITIONS
**
** Name: Displacement Type: Displacement/Rotation
*Boundary
_PickedSet18, 3, 3, 3.
**
** OUTPUT REQUESTS
**
*Restart, write, frequency=0
**
** FIELD OUTPUT: F-Output-1
**
*Output, field
*Node Output
CF, RF, U
*Element Output, directions=YES
EACTIVE, EEQUT, FV, LE, MFR, MVF, PE, PEEQ, PEMAG, S, SDV, SEQUT, STATUS, STATUSXFEM, TE, TEEQ
TEVOL, UVARM
*Contact Output
CDISP, CSTRESS
**
** HISTORY OUTPUT: H-Output-2
**
**
** HISTORY OUTPUT: H-Output-1
**
*Output, history, variable=PRESELECT
*End Step
** ----------------------------------------------------------------
**
** STEP: Step-2
**
*Step, name=Step-2, nlgeom=NO
*Static, direct
0.05, 1.,
**
** BOUNDARY CONDITIONS
**
** Name: BC-1 Type: Displacement/Rotation
*Boundary, op=NEW
_PickedSet5, 1, 1
_PickedSet5, 2, 2
_PickedSet5, 3, 3
_PickedSet5, 4, 4
_PickedSet5, 5, 5
_PickedSet5, 6, 6
** Name: Displacement Type: Displacement/Rotation
*Boundary, op=NEW
**
** OUTPUT REQUESTS
**
*Restart, write, frequency=0
**
** FIELD OUTPUT: F-Output-1
**
*Output, field
*Node Output
CF, RF, U
*Element Output, directions=YES
EACTIVE, EEQUT, FV, LE, MFR, MVF, PE, PEEQ, PEMAG, S, SDV, SEQUT, STATUS, STATUSXFEM, TE, TEEQ
TEVOL, UVARM
*Contact Output
CDISP, CSTRESS
**
** HISTORY OUTPUT: H-Output-2
**
**
** HISTORY OUTPUT: H-Output-1
**
*Output, history, variable=PRESELECT
*End Step
