*Heading
** Job name: Job_001 Model name: Model-1
** Generated by: Abaqus/CAE 6.14-1
*Preprint, echo=NO, model=NO, history=NO, contact=NO
**
** PARTS
**
*Part, name=Bar
*Node
      1,        -100.,          10.
      2,        -99.5,          10.
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*Element, type=CPE8R
   1,     1,     2,   203,   202,  8242,  8243,  8244,  8245
   2,     2,     3,   204,   203,  8246,  8247,  8248,  8243
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*Nset, nset=Set-1, generate
     1,  24481,      1
*Elset, elset=Set-1, generate
    1,  8000,     1
** Section: Bar
*Solid Section, elset=Set-1, material=ZrB2
,
*End Part
**
*Part, name=roller
*Node
      1,           0.,         -10.
      2,  0.697564721,   -9.9756403
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*Element, type=R2D2
 1,  1,  2
 2,  2,  3
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*Node
     91,           0.,  6.123234e-16,           0.
*Nset, nset=roller-RefPt_, internal
91,
*End Part
**
**
** ASSEMBLY
**
*Assembly, name=Assembly
**
*Instance, name=Bar-1, part=Bar
          0.,         -10.,           0.
*End Instance
**
*Instance, name=roller-1, part=roller
        -90.,         -10.,           0.
*End Instance
**
*Instance, name=roller-2, part=roller
        -40.,          30.,           0.
*End Instance
**
*Nset, nset=Set-5, instance=Bar-1
   201,   402,   603,   804,  1005,  1206
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*Elset, elset=Set-5, instance=Bar-1, generate
  200,  8000,   200
*Nset, nset=Set-6, instance=roller-1
 91,
*Nset, nset=Set-7, instance=roller-2
 91,
*Nset, nset=b_Set-1, instance=roller-2, generate
  1,  90,   1
*Elset, elset=b_Set-1, instance=roller-2, generate
  1,  90,   1
*Nset, nset=b_Set-3, instance=roller-1, generate
  1,  90,   1
*Elset, elset=b_Set-3, instance=roller-1, generate
  1,  90,   1
*Nset, nset=_PickedSet9, internal, instance=roller-2
 91,
*Nset, nset=_PickedSet59, internal, instance=roller-1
 91,
*Elset, elset=_m_Surf-1_SNEG, internal, instance=roller-2, generate
  1,  90,   1
*Surface, type=ELEMENT, name=m_Surf-1
_m_Surf-1_SNEG, SNEG
*Elset, elset=_m_Surf-3_SNEG, internal, instance=roller-1, generate
  1,  90,   1
*Surface, type=ELEMENT, name=m_Surf-3
_m_Surf-3_SNEG, SNEG
*Elset, elset=_s_Surf-1_S3, internal, instance=Bar-1, generate
 7801,  8000,     1
*Surface, type=ELEMENT, name=s_Surf-1
_s_Surf-1_S3, S3
*Elset, elset=_s_Surf-3_S1, internal, instance=Bar-1, generate
   1,  200,    1
*Surface, type=ELEMENT, name=s_Surf-3
_s_Surf-3_S1, S1
** Constraint: BottomRoll
*Rigid Body, ref node=_PickedSet59, elset=b_Set-3
** Constraint: TopRoll
*Rigid Body, ref node=_PickedSet9, elset=b_Set-1
*End Assembly
**
** MATERIALS
**
*Material, name=ZrB2
*Depvar
      2,
*User Material, constants=6
595000.,  0.12,  100., 1e-07,    1.,  641.
**
** INTERACTION PROPERTIES
**
*Surface Interaction, name=Contact
1.,
*Friction, slip tolerance=0.005
 0.3,
*Surface Behavior, pressure-overclosure=HARD
**
** BOUNDARY CONDITIONS
**
** Name: Bottom Type: Symmetry/Antisymmetry/Encastre
*Boundary
Set-6, ENCASTRE
** Name: SymmX Type: Symmetry/Antisymmetry/Encastre
*Boundary
Set-5, XSYMM
**
** INTERACTIONS
**
** Interaction: BCon
*Contact Pair, interaction=Contact, type=SURFACE TO SURFACE
s_Surf-3, m_Surf-3
** Interaction: TCon
*Contact Pair, interaction=Contact, type=SURFACE TO SURFACE
s_Surf-1, m_Surf-1
** ----------------------------------------------------------------
**
** STEP: Bend
**
*Step, name=Bend, nlgeom=NO, inc=1000
*Static
0.01, 1., 1e-05, 0.01
**
** BOUNDARY CONDITIONS
**
** Name: Top Type: Displacement/Rotation
*Boundary
Set-7, 1, 1
Set-7, 2, 2, -0.01
Set-7, 6, 6
**
** OUTPUT REQUESTS
**
*Restart, write, frequency=0
**
** FIELD OUTPUT: F-Output-1
**
*Output, field, variable=PRESELECT
**
** HISTORY OUTPUT: H-Output-1
**
*Output, history, variable=PRESELECT
*End Step
** ----------------------------------------------------------------
**
** STEP: Stop
**
*Step, name=Stop, nlgeom=NO, inc=1000
*Static
0.01, 1., 1e-05, 0.01
**
** OUTPUT REQUESTS
**
*Restart, write, frequency=0
**
** FIELD OUTPUT: F-Output-1
**
*Output, field, variable=PRESELECT
**
** HISTORY OUTPUT: H-Output-1
**
*Output, history, variable=PRESELECT
*End Step
